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/batch
! ANSYS input file written by Workbench version 2025 R1
! File used for geometry attach: C:\Users\mundy\OneDrive\Documents\UCI Stuff\BME 60D\60D Deliverable 3_files\dp0\SYS\DM\SYS.scdocx
/title,60D Deliverable 3--Static Structural (A5)
/COM,/COM,     ANSYSMotion, 2025.1
/com,--- Data in consistent NMM units. See Solving Units in the help system for more information.
/units,MPA
/prep7
! Turn off shape checking because checks already performed inside WB mesher.
! See help system for more information.
SHPP,OFF,,NOWARN
etcon,set             ! allow ANSYS to choose best KEYOP's for 180x elements, resets any applicable keyopt to MAPDL defaults
/com,*********** Nodes for the whole assembly ***********
nblock,3,,26098
(1i9,3e20.9e3)
        1     2.151535087E+01     2.600000000E+00    -3.251282503E+00
        2     2.139779171E+01     2.600000000E+00    -3.509037379E+00
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-1
/com,*********** Elements for Body 1 'Default\Default' ***********
et,1,186
eblock,19,solid,,38
(19i9)
        1        1        1        1        0        0        0        0       20        0        1       64       73       72       65       68       76       77       66
      272      290      276      270      284      298      279      278      271      293      291      273
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-1
/com,*********** Elements for Body 2 'Default\Default' ***********
et,2,186
eblock,19,solid,,38
(19i9)
        2        2        2        2        0        0        0        0       20        0       39      406      415      414      407      410      418      419      408
      614      632      618      612      626      640      621      620      613      635      633      615
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-1
/com,*********** Elements for Body 3 'SYS\Fillet2' ***********
et,3,187
eblock,19,solid,,11463
(19i9)
        3        3        3        3        0        0        0        0       10        0       77      694     1792     4546      950     4636    10178     4642     4634
     6295     6297
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-1
/com,*********** Send User Defined Coordinate System(s) ***********
csys,0
toffst,273.15,      ! Temperature offset from absolute zero
/com,*********** Send Materials ***********
Temperature = 'TEMP' ! Temperature
MP,DENS,1,7.85e-09,	! tonne mm^-3
MP,ALPX,1,1.2e-05,	! C^-1
MP,C,1,434000000,	! mm^2 s^-2 C^-1
MP,KXX,1,60.5,	! tonne mm s^-3 C^-1
MP,RSVX,1,0.00017,	! ohm mm
MP,EX,1,200000,	! tonne s^-2 mm^-1
MP,NUXY,1,0.3,
MP,MURX,1,10000,

Temperature = 'TEMP' ! Temperature
MP,DENS,2,7.85e-09,	! tonne mm^-3
MP,ALPX,2,1.2e-05,	! C^-1
MP,C,2,434000000,	! mm^2 s^-2 C^-1
MP,KXX,2,60.5,	! tonne mm s^-3 C^-1
MP,RSVX,2,0.00017,	! ohm mm
MP,EX,2,200000,	! tonne s^-2 mm^-1
MP,NUXY,2,0.3,
MP,MURX,2,10000,


TB,HYPE,3,1,2,MOON
TBDATA,1,0.02,0.005,2

!************************* Model Summary ********************
!Default\Default,	Structural Steel,	matid,	1
!Default\Default,	Structural Steel,	matid,	2
!SYS\Fillet2,	aneursym type shit vtwooo,	matid,	3
!************************* End Model Summary ********************
/com,*********** Create Contact "Contact 1" ***********
*set,tid,5
*set,cid,4
r,tid
r,cid
et,tid,170
et,cid,174
eblock,10,,,26
(15i9)
    19462        5        5        5        0      446      423      421      422      646      643      642      644
    19463        5        5        5        0      445      424      423      446      648      645      646      680
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-1
eblock,10,,,26
(15i9)
    19488        4        4        4        0      446      423      421      422      646      643      642      644
    19489        4        4        4        0      445      424      423      446      648      645      646      680
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-1
eblock,10,,,50
(15i9)
    19514        4        5        4        0      705      943      706      706     4741     4749      706     4738
    19515        4        5        4        0      685      698      687      687     4548     4568      687     4547
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-1
eblock,10,,,50
(15i9)
    19564        5        4        5        0      705      943      706      706     4741     4749      706     4738
    19565        5        4        5        0      685      698      687      687     4548     4568      687     4547
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-1
keyo,cid,8,2               ! auto create asymmetric contact (from Program Controlled setting)
keyo,cid,10,0              ! adjust contact stiffness each NR iteration (from Program Controlled setting)
keyo,cid,12,5              ! bonded always
keyo,cid,18,1              ! small sliding turned on by application
keyo,cid,2,2               ! MPC for bonded contacts (from Program Controlled setting)
keyo,tid,5,0               ! Automatic constraint type detection
keyo,cid,4,2               ! on nodal point - normal to target surface (from Program Controlled setting)
keyo,cid,9,1               ! ignore initial gaps/penetration
keyo,cid,7,0               ! No Prediction
rmod,tid,3,10.      ! FKN
rmod,tid,5,0.       ! ICONT
rmod,tid,6,-2.      ! PINB
rmod,tid,10,0.      ! CNOF
rmod,tid,12,0.      ! FKT
rmod,tid,36,112     ! WB DSID
rmod,cid,3,10.      ! FKN
rmod,cid,5,0.       ! ICONT
rmod,cid,6,-2.      ! PINB
rmod,cid,10,0.      ! CNOF
rmod,cid,12,0.      ! FKT
rmod,cid,36,112     ! WB DSID
/com,*********** Create Contact "Contact 2" ***********
*set,tid,7
*set,cid,6
r,tid
r,cid
et,tid,170
et,cid,174
eblock,10,,,26
(15i9)
    19614        7        7        7        0      104       81       79       80      304      301      300      302
    19615        7        7        7        0      103       82       81      104      306      303      304      338
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-1
eblock,10,,,26
(15i9)
    19640        6        6        6        0      104       81       79       80      304      301      300      302
    19641        6        6        6        0      103       82       81      104      306      303      304      338
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-1
eblock,10,,,50
(15i9)
    19666        6        7        6        0      688      825      700      700     4579     4693      700     4575
    19667        6        7        6        0      686      843      687      687     4561     4570      687     4558
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-1
eblock,10,,,50
(15i9)
    19716        7        6        7        0      688      825      700      700     4579     4693      700     4575
    19717        7        6        7        0      686      843      687      687     4561     4570      687     4558
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-1
keyo,cid,8,2               ! auto create asymmetric contact (from Program Controlled setting)
keyo,cid,10,0              ! adjust contact stiffness each NR iteration (from Program Controlled setting)
keyo,cid,12,5              ! bonded always
keyo,cid,18,1              ! small sliding turned on by application
keyo,cid,2,2               ! MPC for bonded contacts (from Program Controlled setting)
keyo,tid,5,0               ! Automatic constraint type detection
keyo,cid,4,2               ! on nodal point - normal to target surface (from Program Controlled setting)
keyo,cid,9,1               ! ignore initial gaps/penetration
keyo,cid,7,0               ! No Prediction
rmod,tid,3,10.      ! FKN
rmod,tid,5,0.       ! ICONT
rmod,tid,6,-2.      ! PINB
rmod,tid,10,0.      ! CNOF
rmod,tid,12,0.      ! FKT
rmod,tid,36,134     ! WB DSID
rmod,cid,3,10.      ! FKN
rmod,cid,5,0.       ! ICONT
rmod,cid,6,-2.      ! PINB
rmod,cid,10,0.      ! CNOF
rmod,cid,12,0.      ! FKT
rmod,cid,36,134     ! WB DSID
nsel,all
esel,all
/com,*********** Send Named Selection as Element Component ***********
esel,s,type,,3
cm,NONE,elem
esel,all
fini
/solu
rescontrol,,none
outres,erase
outres,all,none
outres,nsol
outres,strs
outres,cont
outres,eangl
outres,veng
outres,etmp
nldiag,cont,iter     ! needed to create file.cnd which hold initial conditions
cntr,print,1         ! needed to create file.cnd which hold initial conditions
esel,s,ename,,169,177
nsle
esln
nsle
cncheck,post
fini
